*Heading
*Preprint, echo=NO, model=NO, history=NO, contact=NO
**
** PARTS
**
*Part, name=GR_Eye
*Node
      1, -0.00601143762, 0.0103823757, 0.000262465066
      2, -0.00600429764, 0.0103898225,  3.74430442e-07
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*Element, type=C3D8
  1,  94,  95,  98,  97,   1,   2,   5,   4
  2,  95,  96,  99,  98,   2,   3,   6,   5
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*Element, type=C3D6
301, 585, 557, 558, 575, 464, 465
302, 556, 557, 566, 463, 464, 576
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*Nset, nset=LC-SET
  91,  92,  93, 184, 185, 186
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*Elset, elset=LC-SET, generate
 301,  330,    1
*Nset, nset=PERIPAP_SCLERA-SET, generate
   1,  558,    1
*Elset, elset=PERIPAP_SCLERA-SET, generate
   1,  300,    1
*Nset, nset=POST_SCLERA-SET
    1,    2,    3,   94,   95,   96
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*Elset, elset=POST_SCLERA-SET, generate
 331,  930,    1
*Solid Section, elset=PERIPAP_SCLERA-SET, material=PERIPAP_SCLERA
,
*Solid Section, elset=LC-SET, material=LC
,
*Solid Section, elset=POST_SCLERA-SET, material=POST_SCLERA
,
*End Part
**
**
** ASSEMBLY
**
*Assembly, name=Assembly
**
*Instance, name=GR_Eye, part=GR_Eye
*End Instance
**
*Node
      1,  -2.29402992e-18, 0.0125000002,  -1.00159003e-19
*Node
      2,           0., 0.0120000001,           0.
*Nset, nset=_PickedSet22, internal
 1,
*Nset, nset=_PickedSet23, internal
 2,
*Nset, nset=_PICKEDSET16, internal, instance=GR_Eye
 570,
*Nset, nset=_PICKEDSET17, internal, instance=GR_Eye
 573,
*Nset, nset=SYMM-Y, instance=GR_Eye
  607,  682,  683,  684,  685,  691
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*Elset, elset=SYMM-Y, instance=GR_Eye
 449, 450, 569, 570, 689, 690, 809, 810, 929, 930
*Nset, nset=YZ-SYMM, instance=GR_Eye
  685,  693,  711,  723, 1319, 1415
*Elset, elset=YZ-SYMM, instance=GR_Eye
 449, 450, 569, 570, 689, 690, 809, 810, 929, 930
*Elset, elset=_ROTSYMM_MASTER_S4, internal, instance=GR_Eye
   2,   4,   6,   8,  10,  12
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*Elset, elset=_ROTSYMM_MASTER_S5, internal, instance=GR_Eye
 301, 305, 306, 307, 311, 312, 313, 317, 318, 319, 323, 324, 325, 329, 330
*Elset, elset=_ROTSYMM_SLAVE_S6, internal, instance=GR_Eye
   1,   3,   5,   7,   9,  11
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*Elset, elset=_ROTSYMM_SLAVE_S5, internal, instance=GR_Eye, generate
 302,  326,    6
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*Elset, elset=_ROTSYMM_MASTER_S4_1, internal, instance=GR_Eye
   2,   4,   6,   8,  10,  12
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*Elset, elset=_ROTSYMM_MASTER_S5_1, internal, instance=GR_Eye
 301, 305, 306, 307, 311, 312, 313, 317, 318, 319, 323, 324, 325, 329, 330
*Surface, type=ELEMENT, name=ROTSYMM_MASTER
_ROTSYMM_MASTER_S4_1, S4
_ROTSYMM_MASTER_S5_1, S5
*Elset, elset=_ROTSYMM_SLAVE_S6_1, internal, instance=GR_Eye
   1,   3,   5,   7,   9,  11
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*Elset, elset=_ROTSYMM_SLAVE_S5_1, internal, instance=GR_Eye, generate
 302,  326,    6
*Elset, elset=_ROTSYMM_SLAVE_S4_1, internal, instance=GR_Eye, generate
 304,  328,    6
*Elset, elset=_ROTSYMM_SLAVE_S3_1, internal, instance=GR_Eye, generate
 306,  330,    6
*Surface, type=ELEMENT, name=ROTSYMM_SLAVE
_ROTSYMM_SLAVE_S6_1, S6
_ROTSYMM_SLAVE_S5_1, S5
_ROTSYMM_SLAVE_S4_1, S4
_ROTSYMM_SLAVE_S3_1, S3
*Elset, elset=_PRESSURE_S2_1, internal, instance=GR_Eye
   1,   2,   3,   4,   5,   6
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*Elset, elset=_PRESSURE_S1_1, internal, instance=GR_Eye, generate
 811,  930,    1
*Surface, type=ELEMENT, name=PRESSURE
_PRESSURE_S2_1, S2
_PRESSURE_S1_1, S1
*Tie, name=Int-CycSymm, cyclic symmetry, adjust=yes
ROTSYMM_SLAVE, ROTSYMM_MASTER
*End Assembly
**
** USER DEFINED INPUT PARAMETERS
**
*Parameter
** Neo-Hookean bulk modulus lamina cribrosa
K_LC = 87000.
** Neo-Hookean shear modulus lamina cribrosa
c1_LC = 25000.
** Stress coefficient of collagen fibers lamina cribrosa
c3_LC = 90000.
** Neo-Hookean bulk modulus sclera
K_Sc  = 174000.
** Neo-Hookean shear modulus sclera
c1_Sc = 50000.
** Stress coefficient of collagen fibers sclera
c3_Sc = 180000.
** Uncrimping rate of collagen fibers
c4 = 11.
** Reference mass density of elastin
Rho0_t0_m = 500.
** Total reference mass density of collagen
Rho0_t0_f = 500.
** Growth parameter
k_sig = 0.00002
** Growth type: 0 - mass density growth; 1 - anisotropic volumetric growth in thickness direction
growth_type = 1
** Half life time of collagen
T=100.
** Homeostatic stretch
lambdae_h = 1.01
**
** MATERIALS
**
** LC
*Material, name=LC
*user material, constants=50, type=mechanical
<K_LC>,<c1_LC>,<c3_LC>,<c4>,<Rho0_t0_m>,<Rho0_t0_f>,<k_sig>,<growth_type>
<T>,<lambdae_h>
*DEPVAR
50
*Material, name=PERIPAP_SCLERA
*user material, constants=50, type=mechanical
<K_Sc>,<c1_Sc>,<c3_Sc>,<c4>,<Rho0_t0_m>,<Rho0_t0_f>,<k_sig>,<growth_type>
<T>,<lambdae_h>
*DEPVAR
50
*Material, name=POST_SCLERA
*user material, constants=50, type=mechanical
<K_Sc>,<c1_Sc>,<c3_Sc>,<c4>,<Rho0_t0_m>,<Rho0_t0_f>,<k_sig>,<growth_type>
<T>,<lambdae_h>
*DEPVAR
50
**
** BOUNDARY CONDITIONS
**
** Name: Disp-BC-1 Type: Symmetry/Antisymmetry/Encastre
*Boundary
SYMM-Y, YSYMM
** Name: Disp-BC-2 Type: Displacement/Rotation
*Boundary
YZ-SYMM, 2, 2
** Name: Disp-BC-3 Type: Displacement/Rotation
*Boundary
YZ-SYMM, 3, 3
** Name: Disp-BC-4 Type: Displacement/Rotation
*Cyclic Symmetry Model, n=72
-2.29403e-18, 0.0125, -1.00159e-19, 0., 0.012, 0.
**-=-=-=-=-=-=-=-=-=-=-=-=-=-=-=-=-=-=-=-=-=-=-=-=-=
*Step, NLGEOM
*Static
1.,100.
*Dsload
pressure, P, 2000.
*OUTPUT, FIELD, VARIABLE=ALL, frequency=100
*END STEP
**-=-=-=-=-=-=-=-=-=-=-=-=-=-=-=-=-=-=-=-=-=-=-=-=-=
*Step, NLGEOM
*Static
1.,100.
*Dsload
pressure, P, 2000.
*OUTPUT, FIELD, VARIABLE=ALL, frequency=100
*END STEP
**-=-=-=-=-=-=-=-=-=-=-=-=-=-=-=-=-=-=-=-=-=-=-=-=-=
*Step, NLGEOM
*Static
1.,100.
*Dsload
pressure, P, 2000.
*OUTPUT, FIELD, VARIABLE=ALL, frequency=100
*END STEP
**-=-=-=-=-=-=-=-=-=-=-=-=-=-=-=-=-=-=-=-=-=-=-=-=-=
*Step, NLGEOM, INC=500
*Static
50.,5000.,1.,200.
*SOLUTION TECHNIQUE, TYPE=QUASI-NEWTON
,
*OUTPUT, FIELD, VARIABLE=ALL, frequency=1
*END STEP
